# System Requirement:
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V1 := 1026 V
V2 := 775 V
n := 45/34
Viso := 30000 V
Nratio := 45/34
Pout := 74 kW
f := 20 kHz
Tmax := 120 °C
Irmsp := Pout/V1 = 72.1248 A
# Fixed Parameters:
# Magnetic Core：
Bsat := 0.2 T
ρ := 7.25*1000*kg/m^3
k := 0.0687
α := 1.778
β := 2.84
kc := 0.2  # 铁心OSE 系：k
# Inter Layer & Core Distance：
dins1 := 0.5 mm
dins2 := 0.5 mm
dt1 := 0.5 mm
dt2 := 0.5 mm
dins_int1 := 0.5 mm
dins_int2 := 0.5 mm
dc1 := 1 mm
dc2 := 1 mm
# Insulating Material：
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# Isolation & Clearance Calculations:
Ksaf := 0.3
dcf1 := 1 mm
dcl1 := 10 mm
dcl2 := 10 mm
diso_min := 3.5 mm
# Free Parameter:
nc := 3
Acore := 4 cm
ds1 := 500 μm
ds2 := 500 μm
m1 := 4
Nl1 := 10
Jmax := 4*A/mm^2
# Dimension Parameter:
# Core Window Dimensions： | Litz Dimension：
m2 := ceil(m1/n) = 4
Nl2 := round(Nl1/n) = 8
AR := round(Nl1/m1) = 3
Acore_tol := V1/(4*kc*m1*Nl1*Bsat*f) = 0.00801563 m^2
Ns1 := round(Irmsp*4/(3.14*Jmax*ds1^2)) = 92
Ns2 := round(Irmsp*4*n/(3.14*Jmax*ds2^2)) = 122
Bcore := Acore_tol/(2*nc*Acore) = 0.0333984 m
hw := m1*ds1*sqrt(Ns1*AR) + Nl1*2*dins_int2 + Nl1*dt1 = 0.0482265 m
W1 := m1*ds1*sqrt(Ns1/AR) + 2*m1*dins_int1 + (m1 - 1)*dins1 = 0.0165755 m
Height := hw + 2*dc1 = 0.0502265 m
MLT1 := 2*(2*Acore + dc1 + 4*dcf1 + nc*Bcore + (nc - 1)*dc2 + 2*W1) = 0.440693 m
W2 := m2*ds2*sqrt(Ns2/AR) + 2*m2*dins_int2 + (m2 - 1)*dins2 = 0.0182541 m
diso := diso_min = 0.0035 m
MLT2 := MLT1 + 4*W1 + 4*W2 + 8*diso = 0.608011 m
Gcore := dcf1 + W1 + diso + W2 + dc1 = 0.0403296 m
ki := k/(2^(β + 1)*3.14^(α - 1)*(0.2761 + 1.7061/(α + 1.354))) = 0.00239958
Vc := 4*nc*Acore*Bcore*(Height + 2*Acore) + 4*nc*Acore*Bcore*Gcore = 2.73423 L
Mcore := Vc*ρ = 19.8231 kg
Pcore := 2^(α + β)*1*W*ki*(f*1000/(1*KHz))^α*(Bsat/(1 T))^β*Vc/(1 m^3) = 74.0089 W
F_acdc := 2
R_wire := 2.5/1000*Ω/m*(1 + (100 - 20)/234.5) = 0.00335288 Ω/m
σ := 0.0172*10^-6*Ω*m
P_pri := Irmsp^2*F_acdc*4*m1*Nl1*MLT1*σ/(ds1^2*3.14*Ns1) = 174.713 W
P_sec := (Irmsp*n)^2*F_acdc*4*σ*m2*Nl2*MLT2/(ds2^2*3.14*Ns2) = 254.734 W
dcl1 = 0.01 m
# Thermal Parameter:
Bcore = 0.0333984 m
knano := 8.35*W/(m*K)
kbobbin := 10*W/(m*K)
kepoxy := 0.15*W/(m*K)
knanoorth := 1.07*W/(m*K)
kair := 0.03*W/(m*K)
kal := 237*W/(m*K)
Rth34 := diso/(Bcore*hw*kbobbin) = 0.217298 K/W
Rth12 := Gcore/(2*Acore*Bcore*knano) = 1.80768 K/W
Rth13 := dcf1/(Height*Bcore*kbobbin) = 0.059613 K/W
Rth35 := dcl1/(Gcore*Bcore*kepoxy) = 49.4947 K/W
Rth45 := dcl2/(hw*Bcore*kepoxy) = 41.3901 K/W
Rth25 := dcl2/(2*Height*Bcore*kepoxy) + Acore/(2*(Height*Bcore)*knanoorth) = 31.0136 K/W
Rth2a := Acore/(3*2*(Height + 2*Acore)*Bcore*knano) = 0.183568 K/W
Q4 := P_sec*Bcore/MLT2 = 13.9927 W
Q2 := 3*Pcore/(4*nc) = 18.5022 W
Q3 := P_pri*Bcore/MLT1 = 13.2408 W
Q1 := Pcore/(4*nc) = 6.16741 W
Ta := 313.5 K
T2 := (Q1 + Q2 + Q3 + Q4)*Rth2a + Ta = 323.028 K
Q := [Q1 + T2/Rth12; Q2 + Ta/Rth2a - T2*(1/Rth12 + 1/Rth2a + 1/Rth25); Q3; Q4]
Yth := [
    1/Rth12 + 1/Rth13, -1/Rth13, 0, 0;
    -1/Rth12, 0, 0, -1/Rth25;
    -1/Rth13, 1/Rth13 + 1/Rth34 + 1/Rth35, -1/Rth34, -1/Rth35;
    0, -1/Rth34, 1/Rth45 + 1/Rth34, -1/Rth45
]
Tsolv := transpose(lsolve(Yth, Q)) = [381.332, 382.887, 385.785, 358.607] K
Tcalmax := max(Tsolv) = 112.635 °C
# Loss:
Ptotal_loss := Pcore + P_pri + P_sec = 503.456 W
# Efficiency:
η := Pout/(Ptotal_loss + Pout) = 0.993243
# Total Volume:
High := Height + 2*Acore = 0.130226 m
Length := nc*Bcore + (nc - 1)*dc2 + 2*(diso + W1 + W2) = 0.178854 m
Width := 2*(Gcore + 2*Acore) + dc1 = 0.241659 m
Volume := High*Length*Width = 5.62863 L
Powerdensity := Pout/Volume = 13.1471 kW/L
